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/batch
! ANSYS input file written by Workbench version 2019 R3
! File used for geometry attach: D:\Studia\MES and MEB\WynikiKratownicyAnsys\KratownicaAnsys_files\dp0\SYS\DM\SYS.agdb
/title,KratownicaAnsys--Static Structural (A5)
/com,--- Data in consistent MKS units. See Solving Units in the help system for more information.
/units,MKS
/prep7
! Turn off shape checking because checks already performed inside WB mesher.
! See help system for more information.
SHPP,OFF,,NOWARN
etcon,set             ! allow ANSYS to choose best KEYOP's for 180x elements
/com,*********** Nodes for the whole assembly ***********
nblock,3,,13
(1i9,3e20.9e3)
        1     1.000000000E+00     2.750000000E+00     0.000000000E+00
        2     2.000000000E+00     0.000000000E+00     0.000000000E+00
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-1
/com,*********** Elements for Body 1 "Line Body" ***********
et,1,188
keyo,1,3,2
eblock,19,solid,,7
(19i9)
        1        1        1        1        0        0        0        0        3        0        1        2        5        6
        1        1        1        1        0        0        0        0        3        0        2        1        3        7
        1        1        1        1        0        0        0        0        3        0        3        3        4        8
        1        1        1        1        0        0        0        0        3        0        4        4        2        9
        1        1        1        1        0        0        0        0        3        0        5        2        3       10
        1        1        1        1        0        0        0        0        3        0        6        1        2       11
        1        1        1        1        0        0        0        0        3        0        7        5        1       12
-1
/com,*********** Send User Defined Coordinate System(s) ***********
csys,0
toffst,273.15,  ! Temperature offset from absolute zero
/com,*********** Set Reference Temperature ***********
tref,22.
/com,*********** Send Materials ***********
Temperature = 'TEMP' ! Temperature
MP,DENS,1,7850,	! kg m^-3
MP,ALPX,1,1.3,	! C^-1
MP,C,1,434,	! J kg^-1 C^-1
MP,KXX,1,60.5,	! W m^-1 C^-1
MP,RSVX,1,1.7e-07,	! kg m^3 A^-2 s^-3
MP,EX,1,190000000000,	! Pa
MP,NUXY,1,0.3,
MP,MURX,1,10000,

/com,*********** Send Beam Properties ***********
SECTYPE,1,BEAM,CSOL
SECDATA,8.92e-003
secoffset,cent

! ****** Begin Command Snippet ******
*dim,matids,,1
*set,matids(1),1
*set,matid,1
*dim,typeids,,1
*set,typeids(1),1
!   Commands inserted into this file will be executed just after material definitions in /PREP7.
!   The material number for this body is equal to the parameter "matid" if it's not a part of a Material Assignment.
!   The element type numbers for this body can be referenced using the 1-D array parameter "typeids".

!   Active UNIT system in Workbench when this object was created:  Metric (m, kg, N, s, V, A)
!   NOTE:  Any data that requires units (such as mass) is assumed to be in the consistent solver unit system.
!                See Solving Units in the help system for more information.


*get,myarea,SECP,matid,PROP,AREA
ET,matid,180
SECTYPE,matid,LINK
SECDATA,myarea
*set, matids, ,
*set, typeids, ,
! ****** End   Command Snippet ******
!************************* Model Summary ********************
!Line Body,	Structural Steel,	matid,	1
!************************* End Model Summary ********************
CMBLOCK,_CM34_FIXEDSU,NODE,        1
(8i10)
         5
/com,*********** Create Displacement Components For Use In Future MSUP Analysis ******
CMBLOCK,_CM109_DISP,NODE,        3
(8i10)
         1         2         3
/com,*********** Create Displacement Components For Use In Future MSUP Analysis ******
CMBLOCK,_CM109_DISP,NODE,        3
(8i10)
         1         2         3
/com,*********** Create Displacement Components For Use In Future MSUP Analysis ******
CMBLOCK,_CM109_DISP,NODE,        3
(8i10)
         1         2         3
/com,*********** Create Displacement Components For Use In Future MSUP Analysis ******
CMBLOCK,_CM38_DISP,NODE,        1
(8i10)
         4
/com,*********** Fixed Supports ***********
CMBLOCK,_FIXEDSU,NODE,        1
(8i10)
         5
cmsel,s,_FIXEDSU
d,all,all
nsel,all
/com,******* Constant Zero Displacement Y *******
CMBLOCK,_DISPZEROUY,NODE,        1
(8i10)
         4
cmsel,s,_DISPZEROUY
d,all,uy,0
nsel,all
/com,******* Constant Zero Displacement Z *******
CMBLOCK,_DISPZEROUZ,NODE,        4
(8i10)
         1         2         3         4
cmsel,s,_DISPZEROUZ
d,all,uz,0
nsel,all
/com,*********** Define Vertex Force Using Follower Elements ***********
et,2,201
keyo,2,1,1           ! Keep the direction constant
keyo,2,2,1           ! Apply Forces only, not moment
mat,2
real,2
type,2
en,8,2
r,2
rmod,2,1,1.0,              ! FX
mat,3
real,3
type,2
en,9,2
r,3
rmod,3,2,1.0,              ! FY
mat,4
real,4
type,2
en,10,2
r,4
rmod,4,3,1.0,              ! FZ
fini
/com,****************************************************************************
/com,*************************    SOLUTION       ********************************
/com,****************************************************************************
/solu
antype,0                   ! static analysis
_thickRatio=  0     ! Ratio of thick parts in the model
eqsl,sparse,,,,,1
cntr,print,1               ! print out contact info and also make no initial contact an error
nldiag,cont,iter           ! print out contact info each equilibrium iteration
rescontrol,linear,last           ! Turn on restart files due to future eigen analysis intent
/com,****************************************************
/com,******************* SOLVE FOR LS 1 OF 1 ****************
esel,s,real,,2
sfe,all,1,pres,1,0.
esel,s,real,,3
sfe,all,1,pres,1,-1000000.
esel,s,real,,4
sfe,all,1,pres,1,0.
esel,all
nsub,1,1,1
time,1.
outres,erase
outres,all,none
outres,nsol,all,
outres,rsol,all
outres,eangl,all
outres,etmp,all
outres,veng,all
outres,strs,all,
outres,epel,all,
outres,eppl,all,
outres,cont,all,
esel,s,type,,1
cm,_elmisc,elem
esel,all
outres,misc,all,_elmisc
! *********** WB SOLVE COMMAND ***********
! check interactive state
*get,ANSINTER_,active,,int
*if,ANSINTER_,ne,0,then
/eof
*endif
solve
/com *************** Write FE CONNECTORS *********
CEWRITE,file,ce,,INTE
/com,****************************************************
/com,*************** FINISHED SOLVE FOR LS 1 *************
/post1
fini
